# OpenSim document version 40500
Model simple_model:
  Ground
  BodySet:
    Body: mass=0.5 [kg] mass_center=(0.5 0 0) inertia=(0.1 0.1 0.1 0 0 0)
      Brick body_geom_1: half_lengths=(0.5 0.1 0.1)
  JointSet:
    PinJoint pin_joint: socket_parent_frame=ground_offset socket_child_frame=body_offset
      Coordinate pin_joint_coord_0: range=(-1.396263 1.047198)
      PhysicalOffsetFrame ground_offset: socket_parent=/ground translation=(0 0 0) [meters]
      PhysicalOffsetFrame body_offset: socket_parent=/bodyset/body translation=(-0.5 0 0)
  ForceSet:
    DeGrooteFregly2016Muscle muscle1: min_control=0.01 max_control=1 max_isometric_force=400 optimal_fiber_length=0.7
        tendon_slack_length=0.1 pennation_angle_at_optimal=0.1 [radians] max_contraction_velocity=10
        activation_time_constant=0.015 deactivation_time_constant=0.05 default_activation=0.05 fiber_damping=0
        passive_fiber_strain_at_one_norm_force=0.6 tendon_strain_at_one_norm_force=0.04
      PathPoint origin: ground (0.1 0.3 0)
      PathPoint insertion: body (0.2 0.1 0)
    DeGrooteFregly2016Muscle muscle2: min_control=0.01 max_control=1 max_isometric_force=400 optimal_fiber_length=0.6
        tendon_slack_length=0.1 pennation_angle_at_optimal=0.1 max_contraction_velocity=10
        activation_time_constant=0.015 deactivation_time_constant=0.05 default_activation=0.05 fiber_damping=0
        passive_fiber_strain_at_one_norm_force=0.6 tendon_strain_at_one_norm_force=0.04
      PathPoint origin: ground (0.1 -0.3 0)
      PathPoint insertion: body (0.2 -0.1 0)
